// SBML level 2 version 4

model Toy_Model()

  // Compartments:
  compartment Cell = 1;

  // Species:
  species $IN in Cell = 10;
  species $OUT in Cell = 10;
  species A in Cell = 18;
  species B1 in Cell = 41;
  species B2 in Cell = 9;
  species C in Cell = 52;
  species E1 in Cell = 50; E1 is "IMPORT";
  species E2 in Cell = 11; E2 is "Diverge";
  species E3 in Cell = 22; E3 is "Converge";
  species E4 in Cell = 35; E4 is "EXPORT";

  // Reactions:
  IMPORT: $IN -> A; E1*(VfE1*(IN/KmIN)^1 - VrE1*(A/IMPORT_KmA)^1)/(1 + IN/KmIN + 1 + A/IMPORT_KmA - 1);  // modifiers: E1
    VfE1 = 1; VrE1 = 1; KmIN = 1; IMPORT_KmA = 1;
  Diverge: A -> B1 + B2; E2*(VfE2*(A/Diverge_KmA)^1 - VrE2*(B1/Diverge_KmB1)^1*(B2/Diverge_KmB2)^1)/(1 + A/Diverge_KmA + (1 + B1/Diverge_KmB1)*(1 + B2/Diverge_KmB2) - 1);  // modifiers: E2
    VfE2 = 1; VrE2 = 1; Diverge_KmA = 1; Diverge_KmB1 = 1; Diverge_KmB2 = 1;
  Converge: B1 + B2 -> C; E3*(VfE3*(B1/Converge_KmB1)^1*(B2/Converge_KmB2)^1 - VrE3*(C/Converge_KmC)^1)/((1 + B1/Converge_KmB1)*(1 + B2/Converge_KmB2) + 1 + C/Converge_KmC - 1);  // modifiers: E3
    VfE3 = 1; VrE3 = 1; Converge_KmB1 = 1; Converge_KmB2 = 1; Converge_KmC = 1;
  EXPORT: C -> $OUT; E4*(VfE4*(C/EXPORT_KmC)^1 - VrE4*(OUT/KmOUT)^1)/(1 + C/EXPORT_KmC + 1 + OUT/KmOUT - 1);  // modifiers: E4
    VfE4 = 1; VrE4 = 1; EXPORT_KmC = 1; KmOUT = 1;
end
