// SBML level 2 version 4

model Glycolysis()

  // Compartments:
  compartment Cell = 1;

  // Species:
  species $GlucoseEx in Cell = 74;
  species $Trehalose in Cell = 0.0153879;
  species $Glycerol in Cell = 0.15;
  species $Acetate in Cell = 223;
  species $Succinate in Cell = 0;
  species $Ethanol in Cell = 221.89;
  species GlucoseIn in Cell = 0.1;
  species ATP in Cell = 4.29;
  species Glucose6P in Cell = 3.8;
  species ADP in Cell = 1.29;
  species Fructose6P in Cell = 0.74;
  species Fructose_1_6P in Cell = 11.8; Fructose_1_6P is "Fructose-1,6P";
  species DihydroacetoneP in Cell = 1.161378;
  species GlyceraldehydeP in Cell = 0.315891;
  species NADH in Cell = 0.29;
  species NAD in Cell = 1.50329;
  species BisPGlycrate in Cell = 1e-5;
  species _3PGlycerate in Cell = 0.69;
  species _2PGlycerate in Cell = 0.09;
  species PEnolPyruvate in Cell = 0.1;
  species Pyruvate in Cell = 2.76;
  species Acetaldehye in Cell = 0.04;
  species E1 in Cell = 0.0020669379; E1 is "GluTransport";
  species E2 in Cell = 0.0130445703; E2 is "Hexokinase";
  species E3 in Cell = 0.0150359237; E3 is "GlucosePIsomerase";
  species E4 in Cell = 0.0025613466; E4 is "TrehaloseSynthase";
  species E5 in Cell = 0.0159954112; E5 is "PFructoseKinase";
  species E6 in Cell = 0.01319835; E6 is "Aldolase";
  species E7 in Cell = 0.0175329642; E7 is "GlycerolPDehydrogenase";
  species E8 in Cell = 0.0099282798; E8 is "TriosePIsomerase";
  species E9 in Cell = 0.119079; E9 is "GlyceraldehyePDehydrogenase";
  species E10 in Cell = 0.0204260765; E10 is "PGlycerateKinase";
  species E11 in Cell = 0.0061999286; E11 is "PGlcyerolMutase";
  species E12 in Cell = 0.0343448703; E12 is "Enolase";
  species E13 in Cell = 0.123978876; E13 is "PyruvateKinase";
  species E14 in Cell = 1; E14 is "ATPase";
  species E15 in Cell = 0.0336973359; E15 is "PyruvateDecarboxylase";
  species E16 in Cell = 1; E16 is "SuccinateDehydrogenase";
  species E17 in Cell = 0.0595393732; E17 is "AlcoholDehydrogenase";
  species E18 in Cell = 0.0523564618; E18 is "AldehydeDehydrogenase";

  // Reactions:
  GluTransport: $GlucoseEx -> GlucoseIn; E1*(VfE1*(GlucoseEx/KmGlucoseEx)^1 - VrE1*(GlucoseIn/GluTransport_KmGlucoseIn)^1)/(1 + GlucoseEx/KmGlucoseEx + 1 + GlucoseIn/GluTransport_KmGlucoseIn - 1);  // modifiers: E1
    VfE1 = 67859.76; VrE1 = 0.0002452622; KmGlucoseEx = 0.3101962; GluTransport_KmGlucoseIn = 0.0003326783;
  Hexokinase: GlucoseIn + ATP -> Glucose6P + ADP; E2*(KiGlucose6P/(KiGlucose6P + Glucose6P))*(VfE2*(GlucoseIn/Hexokinase_KmGlucoseIn)^1*(ATP/Hexokinase_KmATP)^1 - VrE2*(Glucose6P/Hexokinase_KmGlucose6P)^1*(ADP/Hexokinase_KmADP)^1)/((1 + GlucoseIn/Hexokinase_KmGlucoseIn)*(1 + ATP/Hexokinase_KmATP) + (1 + Glucose6P/Hexokinase_KmGlucose6P)*(1 + ADP/Hexokinase_KmADP) - 1);  // modifiers: E2
    VfE2 = 2752.126; VrE2 = 0.01230236; KiGlucose6P = 0.000598441; Hexokinase_KmGlucoseIn = 4.611059; Hexokinase_KmATP = 0.0005434725; Hexokinase_KmGlucose6P = 1.743757; Hexokinase_KmADP = 0.0001208761;
  GlucosePIsomerase: Glucose6P -> Fructose6P; E3*(VfE3*(Glucose6P/GlucosePIsomerase_KmGlucose6P)^1 - VrE3*(Fructose6P/GlucosePIsomerase_KmFructose6P)^1)/(1 + Glucose6P/GlucosePIsomerase_KmGlucose6P + 1 + Fructose6P/GlucosePIsomerase_KmFructose6P - 1);  // modifiers: E3
    VfE3 = 3448.88; VrE3 = 0.0004006551; GlucosePIsomerase_KmGlucose6P = 0.01248151; GlucosePIsomerase_KmFructose6P = 0.02347657;
  TrehaloseSynthase: 2 Glucose6P + ATP -> $Trehalose + ADP; E4*(VfE4*(Glucose6P/TrehaloseSynthase_KmGlucose6P)^2*(ATP/TrehaloseSynthase_KmATP)^1 - VrE4*(Trehalose/KmTrehalose)^1*(ADP/TrehaloseSynthase_KmADP)^1)/((1 + Glucose6P/TrehaloseSynthase_KmGlucose6P + (Glucose6P/TrehaloseSynthase_KmGlucose6P)^2)*(1 + ATP/TrehaloseSynthase_KmATP) + (1 + Trehalose/KmTrehalose)*(1 + ADP/TrehaloseSynthase_KmADP) - 1);  // modifiers: E4
    VfE4 = 1770.214; VrE4 = 0.0009016934; TrehaloseSynthase_KmGlucose6P = 0.797284; TrehaloseSynthase_KmATP = 0.1302242; KmTrehalose = 0.0002024373; TrehaloseSynthase_KmADP = 2.049269e-5;
  PFructoseKinase: Fructose6P + ATP -> Fructose_1_6P + ADP; E5*(KiATP/(KiATP + ATP))*(VfE5*(Fructose6P/PFructoseKinase_KmFructose6P)^1*(ATP/PFructoseKinase_KmATP)^1 - VrE5*(Fructose_1_6P/PFructoseKinase_KmFructose16P)^1*(ADP/PFructoseKinase_KmADP)^1)/((1 + Fructose6P/PFructoseKinase_KmFructose6P)*(1 + ATP/PFructoseKinase_KmATP) + (1 + Fructose_1_6P/PFructoseKinase_KmFructose16P)*(1 + ADP/PFructoseKinase_KmADP) - 1);  // modifiers: E5
    VfE5 = 1592.016; VrE5 = 0.009643877; KiATP = 3.585963; PFructoseKinase_KmFructose6P = 0.5178548; PFructoseKinase_KmATP = 2.69598; PFructoseKinase_KmFructose16P = 9.166279; PFructoseKinase_KmADP = 21.02082;
  Aldolase: Fructose_1_6P -> DihydroacetoneP + GlyceraldehydeP; E6*(VfE6*(Fructose_1_6P/Aldolase_KmFructose16P)^1 - VrE6*(DihydroacetoneP/Aldolase_KmDihydroacetoneP)^1*(GlyceraldehydeP/Aldolase_KmGlyceraldehydeP)^1)/(1 + Fructose_1_6P/Aldolase_KmFructose16P + (1 + DihydroacetoneP/Aldolase_KmDihydroacetoneP)*(1 + GlyceraldehydeP/Aldolase_KmGlyceraldehydeP) - 1);  // modifiers: E6
    VfE6 = 39368.25; VrE6 = 0.02612634; Aldolase_KmFructose16P = 0.5709945; Aldolase_KmDihydroacetoneP = 0.03675691; Aldolase_KmGlyceraldehydeP = 0.00482348;
  GlycerolPDehydrogenase: DihydroacetoneP + NADH -> $Glycerol + NAD; E7*(VfE7*(DihydroacetoneP/GlycerolPDehydrogenase_KmDihydroacetoneP)^1*(NADH/GlycerolPDehydrogenase_KmNADH)^1 - VrE7*(Glycerol/KmGlycerol)^1*(NAD/GlycerolPDehydrogenase_KmNAD)^1)/((1 + DihydroacetoneP/GlycerolPDehydrogenase_KmDihydroacetoneP)*(1 + NADH/GlycerolPDehydrogenase_KmNADH) + (1 + Glycerol/KmGlycerol)*(1 + NAD/GlycerolPDehydrogenase_KmNAD) - 1);  // modifiers: E7
    VfE7 = 1257.751; VrE7 = 0.03925534; GlycerolPDehydrogenase_KmDihydroacetoneP = 2.904834; GlycerolPDehydrogenase_KmNADH = 11.92591; KmGlycerol = 1.026687; GlycerolPDehydrogenase_KmNAD = 1.822184;
  TriosePIsomerase: DihydroacetoneP -> GlyceraldehydeP; E8*(VfE8*(DihydroacetoneP/TriosePIsomerase_KmDihydroacetoneP)^1 - VrE8*(GlyceraldehydeP/TriosePIsomerase_KmGlyceraldehydeP)^1)/(1 + DihydroacetoneP/TriosePIsomerase_KmDihydroacetoneP + 1 + GlyceraldehydeP/TriosePIsomerase_KmGlyceraldehydeP - 1);  // modifiers: E8
    VfE8 = 641.8242; VrE8 = 0.0006479462; TriosePIsomerase_KmDihydroacetoneP = 1.802794; TriosePIsomerase_KmGlyceraldehydeP = 0.5699389;
  GlyceraldehyePDehydrogenase: GlyceraldehydeP + NAD -> BisPGlycrate + NADH; E9*(VfE9*(GlyceraldehydeP/GlyceraldehyePDehydrogenase_KmGlyceraldehydeP)^1*(NAD/GlyceraldehyePDehydrogenase_KmNAD)^1 - VrE9*(BisPGlycrate/GlyceraldehyePDehydrogenase_KmBisPGlycrate)^1*(NADH/GlyceraldehyePDehydrogenase_KmNADH)^1)/((1 + GlyceraldehydeP/GlyceraldehyePDehydrogenase_KmGlyceraldehydeP)*(1 + NAD/GlyceraldehyePDehydrogenase_KmNAD) + (1 + BisPGlycrate/GlyceraldehyePDehydrogenase_KmBisPGlycrate)*(1 + NADH/GlyceraldehyePDehydrogenase_KmNADH) - 1);  // modifiers: E9
    VfE9 = 105863.6; VrE9 = 0.00961262; GlyceraldehyePDehydrogenase_KmGlyceraldehydeP = 0.06965987; GlyceraldehyePDehydrogenase_KmNAD = 3.619777; GlyceraldehyePDehydrogenase_KmBisPGlycrate = 0.01683408; GlyceraldehyePDehydrogenase_KmNADH = 3.110197e-5;
  PGlycerateKinase: BisPGlycrate + ADP -> _3PGlycerate + ATP; E10*(VfE10*(BisPGlycrate/PGlycerateKinase_KmBisPGlycrate)^1*(ADP/PGlycerateKinase_KmADP)^1 - VrE10*(_3PGlycerate/PGlycerateKinase_Km3PGlycerate)^1*(ATP/PGlycerateKinase_KmATP)^1)/((1 + BisPGlycrate/PGlycerateKinase_KmBisPGlycrate)*(1 + ADP/PGlycerateKinase_KmADP) + (1 + _3PGlycerate/PGlycerateKinase_Km3PGlycerate)*(1 + ATP/PGlycerateKinase_KmATP) - 1);  // modifiers: E10
    VfE10 = 111950.2; VrE10 = 0.003683217; PGlycerateKinase_KmBisPGlycrate = 0.0001165143; PGlycerateKinase_KmADP = 0.01292793; PGlycerateKinase_Km3PGlycerate = 0.003713397; PGlycerateKinase_KmATP = 0.102417;
  PGlcyerolMutase: _3PGlycerate -> _2PGlycerate; E11*(VfE11*(_3PGlycerate/PGlcyerolMutase_Km3PGlycerate)^1 - VrE11*(_2PGlycerate/PGlcyerolMutase_Km2PGlycerate)^1)/(1 + _3PGlycerate/PGlcyerolMutase_Km3PGlycerate + 1 + _2PGlycerate/PGlcyerolMutase_Km2PGlycerate - 1);  // modifiers: E11
    VfE11 = 21407.77; VrE11 = 0.00154473; PGlcyerolMutase_Km3PGlycerate = 15.71033; PGlcyerolMutase_Km2PGlycerate = 55.88683;
  Enolase: _2PGlycerate -> PEnolPyruvate; E12*(VfE12*(_2PGlycerate/Enolase_Km2PGlycerate)^1 - VrE12*(PEnolPyruvate/Enolase_KmPEnolPyruvate)^1)/(1 + _2PGlycerate/Enolase_Km2PGlycerate + 1 + PEnolPyruvate/Enolase_KmPEnolPyruvate - 1);  // modifiers: E12
    VfE12 = 2032.291; VrE12 = 0.04691066; Enolase_Km2PGlycerate = 0.000429608; Enolase_KmPEnolPyruvate = 0.0001917378;
  PyruvateKinase: PEnolPyruvate + ADP -> Pyruvate + ATP; E13*(1 + Fructose_1_6P/KaFructose16P)*(VfE13*(PEnolPyruvate/PyruvateKinase_KmPEnolPyruvate)^1*(ADP/PyruvateKinase_KmADP)^1 - VrE13*(Pyruvate/PyruvateKinase_KmPyruvate)^1*(ATP/PyruvateKinase_KmATP)^1)/((1 + PEnolPyruvate/PyruvateKinase_KmPEnolPyruvate)*(1 + ADP/PyruvateKinase_KmADP) + (1 + Pyruvate/PyruvateKinase_KmPyruvate)*(1 + ATP/PyruvateKinase_KmATP) - 1);  // modifiers: E13, Fructose_1_6P
    VfE13 = 7771.979; VrE13 = 0.001781766; KaFructose16P = 3.949376e-5; PyruvateKinase_KmPEnolPyruvate = 7.176144; PyruvateKinase_KmADP = 6.541496e-5; PyruvateKinase_KmPyruvate = 0.003754151; PyruvateKinase_KmATP = 5.147146e-5;
  ATPase: ATP -> ADP; E14*(VfE14*(ATP/ATPase_KmATP)^1 - VrE14*(ADP/ATPase_KmADP)^1)/(1 + ATP/ATPase_KmATP + 1 + ADP/ATPase_KmADP - 1);  // modifiers: E14
    VfE14 = 489.3871; VrE14 = 0.008143049; ATPase_KmATP = 41.78495; ATPase_KmADP = 0.0006716374;
  PyruvateDecarboxylase: Pyruvate -> Acetaldehye; E15*(VfE15*(Pyruvate/PyruvateDecarboxylase_KmPyruvate)^1 - VrE15*(Acetaldehye/PyruvateDecarboxylase_KmAcetaldehye)^1)/(1 + Pyruvate/PyruvateDecarboxylase_KmPyruvate + 1 + Acetaldehye/PyruvateDecarboxylase_KmAcetaldehye - 1);  // modifiers: E15
    VfE15 = 224.961; VrE15 = 0.0001225497; PyruvateDecarboxylase_KmPyruvate = 1.925478; PyruvateDecarboxylase_KmAcetaldehye = 1383.711;
  SuccinateDehydrogenase: Acetaldehye + 3 NAD -> $Succinate + 3 NADH; E16*(VfE16*(Acetaldehye/SuccinateDehydrogenase_KmAcetaldehye)^1*(NAD/SuccinateDehydrogenase_KmNAD)^3 - VrE16*(Succinate/KmSuccinate)^1*(NADH/SuccinateDehydrogenase_KmNADH)^3)/((1 + Acetaldehye/SuccinateDehydrogenase_KmAcetaldehye)*(1 + NAD/SuccinateDehydrogenase_KmNAD + (NAD/SuccinateDehydrogenase_KmNAD)^2 + (NAD/SuccinateDehydrogenase_KmNAD)^3) + (1 + Succinate/KmSuccinate)*(1 + NADH/SuccinateDehydrogenase_KmNADH + (NADH/SuccinateDehydrogenase_KmNADH)^2 + (NADH/SuccinateDehydrogenase_KmNADH)^3) - 1);  // modifiers: E16
    VfE16 = 14176.58; VrE16 = 0.135692; SuccinateDehydrogenase_KmAcetaldehye = 301.6194; SuccinateDehydrogenase_KmNAD = 0.0004331149; KmSuccinate = 0.2933445; SuccinateDehydrogenase_KmNADH = 5.904348e-5;
  AlcoholDehydrogenase: Acetaldehye + NADH -> $Ethanol + NAD; E17*(VfE17*(Acetaldehye/AlcoholDehydrogenase_KmAcetaldehye)^1*(NADH/AlcoholDehydrogenase_KmNADH)^1 - VrE17*(Ethanol/KmEthanol)^1*(NAD/AlcoholDehydrogenase_KmNAD)^1)/((1 + Acetaldehye/AlcoholDehydrogenase_KmAcetaldehye)*(1 + NADH/AlcoholDehydrogenase_KmNADH) + (1 + Ethanol/KmEthanol)*(1 + NAD/AlcoholDehydrogenase_KmNAD) - 1);  // modifiers: E17
    VfE17 = 148173.2; VrE17 = 0.001949286; AlcoholDehydrogenase_KmAcetaldehye = 0.009751295; AlcoholDehydrogenase_KmNADH = 0.1007229; KmEthanol = 168.7963; AlcoholDehydrogenase_KmNAD = 0.01836257;
  AldehydeDehydrogenase: Acetaldehye + NAD -> $Acetate + NADH; E18*(VfE18*(Acetaldehye/AldehydeDehydrogenase_KmAcetaldehye)^1*(NAD/AldehydeDehydrogenase_KmNAD)^1 - VrE18*(Acetate/KmAcetate)^1*(NADH/AldehydeDehydrogenase_KmNADH)^1)/((1 + Acetaldehye/AldehydeDehydrogenase_KmAcetaldehye)*(1 + NAD/AldehydeDehydrogenase_KmNAD) + (1 + Acetate/KmAcetate)*(1 + NADH/AldehydeDehydrogenase_KmNADH) - 1);  // modifiers: E18
    VfE18 = 65609.55; VrE18 = 0.0006264569; AldehydeDehydrogenase_KmAcetaldehye = 1.180508; AldehydeDehydrogenase_KmNAD = 1.360334; KmAcetate = 0.00373617; AldehydeDehydrogenase_KmNADH = 0.0001476708;
end
