// SBML level 2 version 4

model main()

  // Compartments:
  compartment Cell = 1;

  // Species:
  species $GlcO in Cell = 50;
  species $PPP in Cell = 5;
  species $Glycogen in Cell = 8.25;
  species $Glycerol in Cell = 100.2;
  species $Ethanol in Cell = 125;
  species $TCAc in Cell = 7.07;
  species GlcI in Cell = 0.1;
  species G6P in Cell = 3.8;
  species F6P in Cell = 0.74;
  species F16P in Cell = 11.8;
  species DHAP in Cell = 1.16;
  species GAP in Cell = 0.31;
  species Pyruvate in Cell = 2.76;
  species G1P in Cell = 0.54;
  species UDPG in Cell = 0.467;
  species T6P in Cell = 0.02;
  species Trehalose in Cell = 0.015;
  species ATP in Cell = 4.29;
  species ADP in Cell = 1.29;
  species UDP in Cell = 0.28;
  species UTP in Cell = 0.649;
  species NAD in Cell = 1.5;
  species NADH in Cell = 0.29;
  species E1 in Cell = 0.002067; E1 is "GLT";
  species E2 in Cell = 0.013045; E2 is "HXK";
  species E3 in Cell = 0.015036; E3 is "PGI";
  species E4 in Cell = 0.015995; E4 is "PFK";
  species E5 in Cell = 0.013198; E5 is "ALD";
  species E6 in Cell = 0.009928; E6 is "TPI";
  species E7 in Cell = 0.017533; E7 is "G6PDH";
  species E8 in Cell = 0.017533; E8 is "GlycerolDH";
  species E9 in Cell = 0.123979; E9 is "PYK";
  species E10 in Cell = 0.0636773976; E10 is "ADH";
  species E12 in Cell = 0.015471; E12 is "PYC";
  species E13 in Cell = 0.0062; E13 is "PGM";
  species E14 in Cell = 0.002838; E14 is "UDPGP";
  species E15 in Cell = 0.002264; E15 is "GSY";
  species E16 in Cell = 0.003608; E16 is "GPH";
  species E17 in Cell = 0.002561; E17 is "T6PS";
  species E18 in Cell = 0.001947; E18 is "T6PP";
  species E19 in Cell = 0.2518; E19 is "Trehalase";
  species E20 in Cell = 1; E20 is "ATPSyn";
  species E21 in Cell = 1; E21 is "UDPtoUTP";

  // Reactions:
  GLT: $GlcO -> GlcI; E1*(GLT_KiG6P/(GLT_KiG6P + G6P))*(VfE1*(GlcO/KmGlcO)^1 - VrE1*(GlcI/GLT_KmGlcI)^1)/(1 + GlcO/KmGlcO + 1 + GlcI/GLT_KmGlcI - 1);  // modifiers: E1, G6P
    VfE1 = 19963.96; VrE1 = 0.08706219; GLT_KiG6P = 0.4447528; KmGlcO = 1.274972e-5; GLT_KmGlcI = 9.347928;
  HXK: GlcI + ATP -> G6P + ADP; E2*(KiT6P/(KiT6P + T6P))*(VfE2*(GlcI/HXK_KmGlcI)^1*(ATP/HXK_KmATP)^1 - VrE2*(G6P/HXK_KmG6P)^1*(ADP/HXK_KmADP)^1)/((1 + GlcI/HXK_KmGlcI)*(1 + ATP/HXK_KmATP) + (1 + G6P/HXK_KmG6P)*(1 + ADP/HXK_KmADP) - 1);  // modifiers: E2, T6P
    VfE2 = 2516.495; VrE2 = 0.006627165; KiT6P = 0.2969547; HXK_KmGlcI = 0.01298851; HXK_KmATP = 0.01576119; HXK_KmG6P = 0.0005838753; HXK_KmADP = 3.945042e-5;
  PGI: G6P -> F6P; E3*(VfE3*(G6P/PGI_KmG6P)^1 - VrE3*(F6P/PGI_KmF6P)^1)/(1 + G6P/PGI_KmG6P + 1 + F6P/PGI_KmF6P - 1);  // modifiers: E3
    VfE3 = 880.0822; VrE3 = 0.002453867; PGI_KmG6P = 1.055773e-5; PGI_KmF6P = 207.3951;
  PFK: F6P + ATP -> F16P + ADP; E4*(KiATP/(KiATP + ATP))*(VfE4*(F6P/PFK_KmF6P)^1*(ATP/PFK_KmATP)^1 - VrE4*(F16P/PFK_KmF16P)^1*(ADP/PFK_KmADP)^1)/((1 + F6P/PFK_KmF6P)*(1 + ATP/PFK_KmATP) + (1 + F16P/PFK_KmF16P)*(1 + ADP/PFK_KmADP) - 1);  // modifiers: E4
    VfE4 = 4406.322; VrE4 = 0.09451168; KiATP = 74.23386; PFK_KmF6P = 0.00206539; PFK_KmATP = 11.19409; PFK_KmF16P = 0.09203805; PFK_KmADP = 0.003613499;
  ALD: F16P -> DHAP + GAP; E5*(VfE5*(F16P/ALD_KmF16P)^1 - VrE5*(DHAP/ALD_KmDHAP)^1*(GAP/ALD_KmGAP)^1)/(1 + F16P/ALD_KmF16P + (1 + DHAP/ALD_KmDHAP)*(1 + GAP/ALD_KmGAP) - 1);  // modifiers: E5
    VfE5 = 15065.9; VrE5 = 0.006888107; ALD_KmF16P = 0.3265863; ALD_KmDHAP = 4.673992; ALD_KmGAP = 0.001982267;
  TPI: DHAP -> GAP; E6*(VfE6*(DHAP/TPI_KmDHAP)^1 - VrE6*(GAP/TPI_KmGAP)^1)/(1 + DHAP/TPI_KmDHAP + 1 + GAP/TPI_KmGAP - 1);  // modifiers: E6
    VfE6 = 16460.01; VrE6 = 0.00186308; TPI_KmDHAP = 0.02126534; TPI_KmGAP = 0.0004365121;
  G6PDH: G6P -> $PPP; E7*(VfE7*(G6P/G6PDH_KmG6P)^1 - VrE7*(PPP/KmPPP)^1)/(1 + G6P/G6PDH_KmG6P + 1 + PPP/KmPPP - 1);  // modifiers: E7
    VfE7 = 8831.164; VrE7 = 0.002435535; G6PDH_KmG6P = 0.0007646351; KmPPP = 5.915625e-5;
  GlycerolDH: DHAP + NADH -> $Glycerol + NAD; E8*(VfE8*(DHAP/GlycerolDH_KmDHAP)^1*(NADH/GlycerolDH_KmNADH)^1 - VrE8*(Glycerol/KmGlycerol)^1*(NAD/GlycerolDH_KmNAD)^1)/((1 + DHAP/GlycerolDH_KmDHAP)*(1 + NADH/GlycerolDH_KmNADH) + (1 + Glycerol/KmGlycerol)*(1 + NAD/GlycerolDH_KmNAD) - 1);  // modifiers: E8
    VfE8 = 6510.348; VrE8 = 0.00136898; GlycerolDH_KmDHAP = 0.1919742; GlycerolDH_KmNADH = 0.0004030453; KmGlycerol = 0.005177377; GlycerolDH_KmNAD = 0.1424471;
  PYK: GAP + ADP -> Pyruvate + ATP; E9*(1 + F16P/KaF16P)*(VfE9*(GAP/PYK_KmGAP)^1*(ADP/PYK_KmADP)^1 - VrE9*(Pyruvate/PYK_KmPyruvate)^1*(ATP/PYK_KmATP)^1)/((1 + GAP/PYK_KmGAP)*(1 + ADP/PYK_KmADP) + (1 + Pyruvate/PYK_KmPyruvate)*(1 + ATP/PYK_KmATP) - 1);  // modifiers: E9, F16P
    VfE9 = 4036.347; VrE9 = 0.0869646; KaF16P = 94.23539; PYK_KmGAP = 3.240896; PYK_KmADP = 1.915634e-5; PYK_KmPyruvate = 0.7173625; PYK_KmATP = 0.1116858;
  ADH: Pyruvate + NADH -> $Ethanol + NAD; E10*(VfE10*(Pyruvate/ADH_KmPyruvate)^1*(NADH/ADH_KmNADH)^1 - VrE10*(Ethanol/KmEthanol)^1*(NAD/ADH_KmNAD)^1)/((1 + Pyruvate/ADH_KmPyruvate)*(1 + NADH/ADH_KmNADH) + (1 + Ethanol/KmEthanol)*(1 + NAD/ADH_KmNAD) - 1);  // modifiers: E10
    VfE10 = 8391.287; VrE10 = 0.001990338; ADH_KmPyruvate = 3.169785; ADH_KmNADH = 0.785209; KmEthanol = 172.7391; ADH_KmNAD = 1.180576;
  PYC: Pyruvate + 3 NAD -> $TCAc + 3 NADH; E12*(VfE12*(Pyruvate/PYC_KmPyruvate)^1*(NAD/PYC_KmNAD)^3 - VrE12*(TCAc/KmTCAc)^1*(NADH/PYC_KmNADH)^3)/((1 + Pyruvate/PYC_KmPyruvate)*(1 + NAD/PYC_KmNAD + (NAD/PYC_KmNAD)^2 + (NAD/PYC_KmNAD)^3) + (1 + TCAc/KmTCAc)*(1 + NADH/PYC_KmNADH + (NADH/PYC_KmNADH)^2 + (NADH/PYC_KmNADH)^3) - 1);  // modifiers: E12
    VfE12 = 1479.089; VrE12 = 0.002896673; PYC_KmPyruvate = 0.8917172; PYC_KmNAD = 1.377986e-5; KmTCAc = 0.001211403; PYC_KmNADH = 2.059973e-5;
  PGM: G6P -> G1P; E13*(VfE13*(G6P/PGM_KmG6P)^1 - VrE13*(G1P/PGM_KmG1P)^1)/(1 + G6P/PGM_KmG6P + 1 + G1P/PGM_KmG1P - 1);  // modifiers: E13
    VfE13 = 1848.015; VrE13 = 0.0009678013; PGM_KmG6P = 1.52152; PGM_KmG1P = 1.734745;
  UDPGP: G1P + UTP -> UDPG; E14*(VfE14*(G1P/UDPGP_KmG1P)^1*(UTP/UDPGP_KmUTP)^1 - VrE14*(UDPG/UDPGP_KmUDPG)^1)/((1 + G1P/UDPGP_KmG1P)*(1 + UTP/UDPGP_KmUTP) + 1 + UDPG/UDPGP_KmUDPG - 1);  // modifiers: E14
    VfE14 = 17214.71; VrE14 = 0.003046874; UDPGP_KmG1P = 9.662726e-6; UDPGP_KmUTP = 32.77319; UDPGP_KmUDPG = 171.7944;
  GSY: UDPG -> $Glycogen + UDP; E15*(GSY_KiG6P/(GSY_KiG6P + G6P))*(VfE15*(UDPG/GSY_KmUDPG)^1 - VrE15*(Glycogen/GSY_KmGlycogen)^1*(UDP/GSY_KmUDP)^1)/(1 + UDPG/GSY_KmUDPG + (1 + Glycogen/GSY_KmGlycogen)*(1 + UDP/GSY_KmUDP) - 1);  // modifiers: E15, G6P
    VfE15 = 17544.04; VrE15 = 0.001970165; GSY_KiG6P = 263.176; GSY_KmUDPG = 9.304851e-6; GSY_KmGlycogen = 0.0002480101; GSY_KmUDP = 996.6139;
  GPH: $Glycogen -> G1P; E16*(1 + G6P/GPH_KaG6P)*(VfE16*(Glycogen/GPH_KmGlycogen)^1 - VrE16*(G1P/GPH_KmG1P)^1)/(1 + Glycogen/GPH_KmGlycogen + 1 + G1P/GPH_KmG1P - 1);  // modifiers: E16, G6P
    VfE16 = 1324.646; VrE16 = 0.09885609; GPH_KaG6P = 89.63523; GPH_KmGlycogen = 0.003084371; GPH_KmG1P = 8.425521e-5;
  T6PS: G6P + UDPG -> T6P + UDP; E17*(1 + G6P/T6PS_KaG6P)*(VfE17*(G6P/T6PS_KmG6P)^1*(UDPG/T6PS_KmUDPG)^1 - VrE17*(T6P/T6PS_KmT6P)^1*(UDP/T6PS_KmUDP)^1)/((1 + G6P/T6PS_KmG6P)*(1 + UDPG/T6PS_KmUDPG) + (1 + T6P/T6PS_KmT6P)*(1 + UDP/T6PS_KmUDP) - 1);  // modifiers: E17
    VfE17 = 736.2855; VrE17 = 0.09064341; T6PS_KaG6P = 99.58747; T6PS_KmG6P = 0.00334495; T6PS_KmUDPG = 0.01179357; T6PS_KmT6P = 0.004492365; T6PS_KmUDP = 0.01665032;
  T6PP: T6P -> Trehalose; E18*(VfE18*(T6P/T6PP_KmT6P)^1 - VrE18*(Trehalose/T6PP_KmTrehalose)^1)/(1 + T6P/T6PP_KmT6P + 1 + Trehalose/T6PP_KmTrehalose - 1);  // modifiers: E18
    VfE18 = 1011.923; VrE18 = 0.001096403; T6PP_KmT6P = 0.3087332; T6PP_KmTrehalose = 0.9179188;
  Trehalase: Trehalose -> 2 GlcI; E19*(VfE19*(Trehalose/Trehalase_KmTrehalose)^1 - VrE19*(GlcI/Trehalase_KmGlcI)^2)/(1 + Trehalose/Trehalase_KmTrehalose + 1 + GlcI/Trehalase_KmGlcI + (GlcI/Trehalase_KmGlcI)^2 - 1);  // modifiers: E19
    VfE19 = 3768.117; VrE19 = 0.001068616; Trehalase_KmTrehalose = 0.1663383; Trehalase_KmGlcI = 0.0665045;
  ATPSyn: ADP -> ATP; E20*(VfE20*(ADP/ATPSyn_KmADP)^1 - VrE20*(ATP/ATPSyn_KmATP)^1)/(1 + ADP/ATPSyn_KmADP + 1 + ATP/ATPSyn_KmATP - 1);  // modifiers: E20
    VfE20 = 12904.07; VrE20 = 0.001048101; ATPSyn_KmADP = 0.001198061; ATPSyn_KmATP = 0.0006383032;
  UDPtoUTP: UDP + ATP -> UTP + ADP; E21*(VfE21*(UDP/UDPtoUTP_KmUDP)^1*(ATP/UDPtoUTP_KmATP)^1 - VrE21*(UTP/UDPtoUTP_KmUTP)^1*(ADP/UDPtoUTP_KmADP)^1)/((1 + UDP/UDPtoUTP_KmUDP)*(1 + ATP/UDPtoUTP_KmATP) + (1 + UTP/UDPtoUTP_KmUTP)*(1 + ADP/UDPtoUTP_KmADP) - 1);  // modifiers: E21
    VfE21 = 4353.979; VrE21 = 0.005985351; UDPtoUTP_KmUDP = 0.4825948; UDPtoUTP_KmATP = 7.667651; UDPtoUTP_KmUTP = 9.234479e-5; UDPtoUTP_KmADP = 91.00293;
end
