// SBML level 2 version 4

model Glycolysis()

  // Compartments:
  compartment Cell = 1;

  // Species:
  species $GlucoseEx in Cell = 74;
  species $Trehalose in Cell = 0.0153879;
  species $Glycerol in Cell = 0.15;
  species $Acetate in Cell = 223;
  species $Succinate in Cell = 0;
  species $Ethanol in Cell = 221.89;
  species GlucoseIn in Cell = 0.1;
  species ATP in Cell = 4.29;
  species Glucose6P in Cell = 3.8;
  species ADP in Cell = 1.29;
  species Fructose6P in Cell = 0.74;
  species Fructose_1_6P in Cell = 11.8; Fructose_1_6P is "Fructose-1,6P";
  species DihydroacetoneP in Cell = 1.161378;
  species GlyceraldehydeP in Cell = 0.315891;
  species NADH in Cell = 0.29;
  species NAD in Cell = 1.50329;
  species BisPGlycrate in Cell = 1e-5;
  species _3PGlycerate in Cell = 0.69;
  species _2PGlycerate in Cell = 0.09;
  species PEnolPyruvate in Cell = 0.1;
  species Pyruvate in Cell = 2.76;
  species Acetaldehye in Cell = 0.04;
  species E1 in Cell = 0.0020669379; E1 is "GluTransport";
  species E2 in Cell = 0.0130445703; E2 is "Hexokinase";
  species E3 in Cell = 0.0150359237; E3 is "GlucosePIsomerase";
  species E4 in Cell = 0.0025613466; E4 is "TrehaloseSynthase";
  species E5 in Cell = 0.0159954112; E5 is "PFructoseKinase";
  species E6 in Cell = 0.01319835; E6 is "Aldolase";
  species E7 in Cell = 0.0175329642; E7 is "GlycerolPDehydrogenase";
  species E8 in Cell = 0.0099282798; E8 is "TriosePIsomerase";
  species E9 in Cell = 0.119079; E9 is "GlyceraldehyePDehydrogenase";
  species E10 in Cell = 0.0204260765; E10 is "PGlycerateKinase";
  species E11 in Cell = 0.0061999286; E11 is "PGlcyerolMutase";
  species E12 in Cell = 0.0343448703; E12 is "Enolase";
  species E13 in Cell = 0.123978876; E13 is "PyruvateKinase";
  species E14 in Cell = 1; E14 is "ATPase";
  species E15 in Cell = 0.0336973359; E15 is "PyruvateDecarboxylase";
  species E16 in Cell = 1; E16 is "SuccinateDehydrogenase";
  species E17 in Cell = 0.0595393732; E17 is "AlcoholDehydrogenase";
  species E18 in Cell = 0.0523564618; E18 is "AldehydeDehydrogenase";

  // Reactions:
  GluTransport: $GlucoseEx -> GlucoseIn; E1*(VfE1*(GlucoseEx/KmGlucoseEx)^1 - VrE1*(GlucoseIn/GluTransport_KmGlucoseIn)^1)/(1 + GlucoseEx/KmGlucoseEx + 1 + GlucoseIn/GluTransport_KmGlucoseIn - 1);  // modifiers: E1
    VfE1 = 1; VrE1 = 1; KmGlucoseEx = 1; GluTransport_KmGlucoseIn = 1;
  Hexokinase: GlucoseIn + ATP -> Glucose6P + ADP; E2*(KiGlucose6P/(KiGlucose6P + Glucose6P))*(VfE2*(GlucoseIn/Hexokinase_KmGlucoseIn)^1*(ATP/Hexokinase_KmATP)^1 - VrE2*(Glucose6P/Hexokinase_KmGlucose6P)^1*(ADP/Hexokinase_KmADP)^1)/((1 + GlucoseIn/Hexokinase_KmGlucoseIn)*(1 + ATP/Hexokinase_KmATP) + (1 + Glucose6P/Hexokinase_KmGlucose6P)*(1 + ADP/Hexokinase_KmADP) - 1);  // modifiers: E2
    VfE2 = 1; VrE2 = 1; KiGlucose6P = 1; Hexokinase_KmGlucoseIn = 1; Hexokinase_KmATP = 1; Hexokinase_KmGlucose6P = 1; Hexokinase_KmADP = 1;
  GlucosePIsomerase: Glucose6P -> Fructose6P; E3*(VfE3*(Glucose6P/GlucosePIsomerase_KmGlucose6P)^1 - VrE3*(Fructose6P/GlucosePIsomerase_KmFructose6P)^1)/(1 + Glucose6P/GlucosePIsomerase_KmGlucose6P + 1 + Fructose6P/GlucosePIsomerase_KmFructose6P - 1);  // modifiers: E3
    VfE3 = 1; VrE3 = 1; GlucosePIsomerase_KmGlucose6P = 1; GlucosePIsomerase_KmFructose6P = 1;
  TrehaloseSynthase: 2 Glucose6P + ATP -> $Trehalose + ADP; E4*(VfE4*(Glucose6P/TrehaloseSynthase_KmGlucose6P)^2*(ATP/TrehaloseSynthase_KmATP)^1 - VrE4*(Trehalose/KmTrehalose)^1*(ADP/TrehaloseSynthase_KmADP)^1)/((1 + Glucose6P/TrehaloseSynthase_KmGlucose6P + (Glucose6P/TrehaloseSynthase_KmGlucose6P)^2)*(1 + ATP/TrehaloseSynthase_KmATP) + (1 + Trehalose/KmTrehalose)*(1 + ADP/TrehaloseSynthase_KmADP) - 1);  // modifiers: E4
    VfE4 = 1; VrE4 = 1; TrehaloseSynthase_KmGlucose6P = 1; TrehaloseSynthase_KmATP = 1; KmTrehalose = 1; TrehaloseSynthase_KmADP = 1;
  PFructoseKinase: Fructose6P + ATP -> Fructose_1_6P + ADP; E5*(KiATP/(KiATP + ATP))*(VfE5*(Fructose6P/PFructoseKinase_KmFructose6P)^1*(ATP/PFructoseKinase_KmATP)^1 - VrE5*(Fructose_1_6P/PFructoseKinase_KmFructose16P)^1*(ADP/PFructoseKinase_KmADP)^1)/((1 + Fructose6P/PFructoseKinase_KmFructose6P)*(1 + ATP/PFructoseKinase_KmATP) + (1 + Fructose_1_6P/PFructoseKinase_KmFructose16P)*(1 + ADP/PFructoseKinase_KmADP) - 1);  // modifiers: E5
    VfE5 = 1; VrE5 = 1; KiATP = 1; PFructoseKinase_KmFructose6P = 1; PFructoseKinase_KmATP = 1; PFructoseKinase_KmFructose16P = 1; PFructoseKinase_KmADP = 1;
  Aldolase: Fructose_1_6P -> DihydroacetoneP + GlyceraldehydeP; E6*(VfE6*(Fructose_1_6P/Aldolase_KmFructose16P)^1 - VrE6*(DihydroacetoneP/Aldolase_KmDihydroacetoneP)^1*(GlyceraldehydeP/Aldolase_KmGlyceraldehydeP)^1)/(1 + Fructose_1_6P/Aldolase_KmFructose16P + (1 + DihydroacetoneP/Aldolase_KmDihydroacetoneP)*(1 + GlyceraldehydeP/Aldolase_KmGlyceraldehydeP) - 1);  // modifiers: E6
    VfE6 = 1; VrE6 = 1; Aldolase_KmFructose16P = 1; Aldolase_KmDihydroacetoneP = 1; Aldolase_KmGlyceraldehydeP = 1;
  GlycerolPDehydrogenase: DihydroacetoneP + NADH -> $Glycerol + NAD; E7*(VfE7*(DihydroacetoneP/GlycerolPDehydrogenase_KmDihydroacetoneP)^1*(NADH/GlycerolPDehydrogenase_KmNADH)^1 - VrE7*(Glycerol/KmGlycerol)^1*(NAD/GlycerolPDehydrogenase_KmNAD)^1)/((1 + DihydroacetoneP/GlycerolPDehydrogenase_KmDihydroacetoneP)*(1 + NADH/GlycerolPDehydrogenase_KmNADH) + (1 + Glycerol/KmGlycerol)*(1 + NAD/GlycerolPDehydrogenase_KmNAD) - 1);  // modifiers: E7
    VfE7 = 1; VrE7 = 1; GlycerolPDehydrogenase_KmDihydroacetoneP = 1; GlycerolPDehydrogenase_KmNADH = 1; KmGlycerol = 1; GlycerolPDehydrogenase_KmNAD = 1;
  TriosePIsomerase: DihydroacetoneP -> GlyceraldehydeP; E8*(VfE8*(DihydroacetoneP/TriosePIsomerase_KmDihydroacetoneP)^1 - VrE8*(GlyceraldehydeP/TriosePIsomerase_KmGlyceraldehydeP)^1)/(1 + DihydroacetoneP/TriosePIsomerase_KmDihydroacetoneP + 1 + GlyceraldehydeP/TriosePIsomerase_KmGlyceraldehydeP - 1);  // modifiers: E8
    VfE8 = 1; VrE8 = 1; TriosePIsomerase_KmDihydroacetoneP = 1; TriosePIsomerase_KmGlyceraldehydeP = 1;
  GlyceraldehyePDehydrogenase: GlyceraldehydeP + NAD -> BisPGlycrate + NADH; E9*(VfE9*(GlyceraldehydeP/GlyceraldehyePDehydrogenase_KmGlyceraldehydeP)^1*(NAD/GlyceraldehyePDehydrogenase_KmNAD)^1 - VrE9*(BisPGlycrate/GlyceraldehyePDehydrogenase_KmBisPGlycrate)^1*(NADH/GlyceraldehyePDehydrogenase_KmNADH)^1)/((1 + GlyceraldehydeP/GlyceraldehyePDehydrogenase_KmGlyceraldehydeP)*(1 + NAD/GlyceraldehyePDehydrogenase_KmNAD) + (1 + BisPGlycrate/GlyceraldehyePDehydrogenase_KmBisPGlycrate)*(1 + NADH/GlyceraldehyePDehydrogenase_KmNADH) - 1);  // modifiers: E9
    VfE9 = 1; VrE9 = 1; GlyceraldehyePDehydrogenase_KmGlyceraldehydeP = 1; GlyceraldehyePDehydrogenase_KmNAD = 1; GlyceraldehyePDehydrogenase_KmBisPGlycrate = 1; GlyceraldehyePDehydrogenase_KmNADH = 1;
  PGlycerateKinase: BisPGlycrate + ADP -> _3PGlycerate + ATP; E10*(VfE10*(BisPGlycrate/PGlycerateKinase_KmBisPGlycrate)^1*(ADP/PGlycerateKinase_KmADP)^1 - VrE10*(_3PGlycerate/PGlycerateKinase_Km3PGlycerate)^1*(ATP/PGlycerateKinase_KmATP)^1)/((1 + BisPGlycrate/PGlycerateKinase_KmBisPGlycrate)*(1 + ADP/PGlycerateKinase_KmADP) + (1 + _3PGlycerate/PGlycerateKinase_Km3PGlycerate)*(1 + ATP/PGlycerateKinase_KmATP) - 1);  // modifiers: E10
    VfE10 = 1; VrE10 = 1; PGlycerateKinase_KmBisPGlycrate = 1; PGlycerateKinase_KmADP = 1; PGlycerateKinase_Km3PGlycerate = 1; PGlycerateKinase_KmATP = 1;
  PGlcyerolMutase: _3PGlycerate -> _2PGlycerate; E11*(VfE11*(_3PGlycerate/PGlcyerolMutase_Km3PGlycerate)^1 - VrE11*(_2PGlycerate/PGlcyerolMutase_Km2PGlycerate)^1)/(1 + _3PGlycerate/PGlcyerolMutase_Km3PGlycerate + 1 + _2PGlycerate/PGlcyerolMutase_Km2PGlycerate - 1);  // modifiers: E11
    VfE11 = 1; VrE11 = 1; PGlcyerolMutase_Km3PGlycerate = 1; PGlcyerolMutase_Km2PGlycerate = 1;
  Enolase: _2PGlycerate -> PEnolPyruvate; E12*(VfE12*(_2PGlycerate/Enolase_Km2PGlycerate)^1 - VrE12*(PEnolPyruvate/Enolase_KmPEnolPyruvate)^1)/(1 + _2PGlycerate/Enolase_Km2PGlycerate + 1 + PEnolPyruvate/Enolase_KmPEnolPyruvate - 1);  // modifiers: E12
    VfE12 = 1; VrE12 = 1; Enolase_Km2PGlycerate = 1; Enolase_KmPEnolPyruvate = 1;
  PyruvateKinase: PEnolPyruvate + ADP -> Pyruvate + ATP; E13*(1 + Fructose_1_6P/KaFructose16P)*(VfE13*(PEnolPyruvate/PyruvateKinase_KmPEnolPyruvate)^1*(ADP/PyruvateKinase_KmADP)^1 - VrE13*(Pyruvate/PyruvateKinase_KmPyruvate)^1*(ATP/PyruvateKinase_KmATP)^1)/((1 + PEnolPyruvate/PyruvateKinase_KmPEnolPyruvate)*(1 + ADP/PyruvateKinase_KmADP) + (1 + Pyruvate/PyruvateKinase_KmPyruvate)*(1 + ATP/PyruvateKinase_KmATP) - 1);  // modifiers: E13, Fructose_1_6P
    VfE13 = 1; VrE13 = 1; KaFructose16P = 1; PyruvateKinase_KmPEnolPyruvate = 1; PyruvateKinase_KmADP = 1; PyruvateKinase_KmPyruvate = 1; PyruvateKinase_KmATP = 1;
  ATPase: ATP -> ADP; E14*(VfE14*(ATP/ATPase_KmATP)^1 - VrE14*(ADP/ATPase_KmADP)^1)/(1 + ATP/ATPase_KmATP + 1 + ADP/ATPase_KmADP - 1);  // modifiers: E14
    VfE14 = 1; VrE14 = 1; ATPase_KmATP = 1; ATPase_KmADP = 1;
  PyruvateDecarboxylase: Pyruvate -> Acetaldehye; E15*(VfE15*(Pyruvate/PyruvateDecarboxylase_KmPyruvate)^1 - VrE15*(Acetaldehye/PyruvateDecarboxylase_KmAcetaldehye)^1)/(1 + Pyruvate/PyruvateDecarboxylase_KmPyruvate + 1 + Acetaldehye/PyruvateDecarboxylase_KmAcetaldehye - 1);  // modifiers: E15
    VfE15 = 1; VrE15 = 1; PyruvateDecarboxylase_KmPyruvate = 1; PyruvateDecarboxylase_KmAcetaldehye = 1;
  SuccinateDehydrogenase: Acetaldehye + 3 NAD -> $Succinate + 3 NADH; E16*(VfE16*(Acetaldehye/SuccinateDehydrogenase_KmAcetaldehye)^1*(NAD/SuccinateDehydrogenase_KmNAD)^3 - VrE16*(Succinate/KmSuccinate)^1*(NADH/SuccinateDehydrogenase_KmNADH)^3)/((1 + Acetaldehye/SuccinateDehydrogenase_KmAcetaldehye)*(1 + NAD/SuccinateDehydrogenase_KmNAD + (NAD/SuccinateDehydrogenase_KmNAD)^2 + (NAD/SuccinateDehydrogenase_KmNAD)^3) + (1 + Succinate/KmSuccinate)*(1 + NADH/SuccinateDehydrogenase_KmNADH + (NADH/SuccinateDehydrogenase_KmNADH)^2 + (NADH/SuccinateDehydrogenase_KmNADH)^3) - 1);  // modifiers: E16
    VfE16 = 1; VrE16 = 1; SuccinateDehydrogenase_KmAcetaldehye = 1; SuccinateDehydrogenase_KmNAD = 1; KmSuccinate = 1; SuccinateDehydrogenase_KmNADH = 1;
  AlcoholDehydrogenase: Acetaldehye + NADH -> $Ethanol + NAD; E17*(VfE17*(Acetaldehye/AlcoholDehydrogenase_KmAcetaldehye)^1*(NADH/AlcoholDehydrogenase_KmNADH)^1 - VrE17*(Ethanol/KmEthanol)^1*(NAD/AlcoholDehydrogenase_KmNAD)^1)/((1 + Acetaldehye/AlcoholDehydrogenase_KmAcetaldehye)*(1 + NADH/AlcoholDehydrogenase_KmNADH) + (1 + Ethanol/KmEthanol)*(1 + NAD/AlcoholDehydrogenase_KmNAD) - 1);  // modifiers: E17
    VfE17 = 1; VrE17 = 1; AlcoholDehydrogenase_KmAcetaldehye = 1; AlcoholDehydrogenase_KmNADH = 1; KmEthanol = 1; AlcoholDehydrogenase_KmNAD = 1;
  AldehydeDehydrogenase: Acetaldehye + NAD -> $Acetate + NADH; E18*(VfE18*(Acetaldehye/AldehydeDehydrogenase_KmAcetaldehye)^1*(NAD/AldehydeDehydrogenase_KmNAD)^1 - VrE18*(Acetate/KmAcetate)^1*(NADH/AldehydeDehydrogenase_KmNADH)^1)/((1 + Acetaldehye/AldehydeDehydrogenase_KmAcetaldehye)*(1 + NAD/AldehydeDehydrogenase_KmNAD) + (1 + Acetate/KmAcetate)*(1 + NADH/AldehydeDehydrogenase_KmNADH) - 1);  // modifiers: E18
    VfE18 = 1; VrE18 = 1; AldehydeDehydrogenase_KmAcetaldehye = 1; AldehydeDehydrogenase_KmNAD = 1; KmAcetate = 1; AldehydeDehydrogenase_KmNADH = 1;
end
